ma := 250
i := 0 .. ma
j := 0 .. ma
A[i, j] := if(i == j, 1, sign(i - j)*sqrt(|i - j|))
r[j] := trunc(rnd(30) - 10)
k[i] := sum(if(i == j, 0, |A[i, j]|), j)
A[i, i] := A[i, i] + k[i]
b := A*r
string := "Degeneration"
Gss(A, b) :=
    [(ε ← 10^-10), (n ← last(b)), (C ← augment(A, b))]
    for i ∈ 0 .. n
        [(k ← 0), (p ← 0)]
        for j ∈ i .. n
            q ← C[i, j]
            [(p ← q), (k ← j)] if |q| > |p|
        return string if |p| < ε
        [(a ← C[:, i]), (C[:, i] ← C[:, k]/p)]
        C[:, k] ← a if k ≠ i
        for j ∈ 0 .. n
            C[:, j] ← C[:, j] - C[:, i]*C[i, j] if j ≠ i
    transpose(C)[:, n + 1]
O := Gss(A, b)  # error: This value must be a matrix of scalar elements.
Iter(A, b, σ) :=
    ε ← 10^-10, n  # error: This placeholder is empty.
