a := 0.2
b := 1
# 1. Метод деления пополам
f(x) := e^(1/x^2)*atan(x) - 8
Bisec(f, a, b, ε) :=
    c ← (a + b)/2
    if(|a - b| < ε, c, if((f(a)*f(c)) > 0, Bisec(f, c, b, ε), Bisec(f, a, c, ε)))
f(0.5) = 17.3143
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f(10) = -6.51409
x := Bisec(f, a, b, 10^-10)
x = 0.610811
f(x) = -1.14044e-9
# 2. Метод Ньютона
F(x) := [
    sin(x[0]/(x[1] + 1)) - 2*(cos(x[3]*x[1]) - x[3]);
    x[0]^2 + x[1]^2 + x[2]^2 - (2*x[3])^2;
    (x[0] + x[3])/(x[1] + x[2] + x[3]) - x[1]*x[3];
    x[0]*x[1] + x[1]*x[2] + x[2]*x[3] + x[3]*x[0] - 2
]
f1(x) := transpose(augment(∇[x](F(x)[0]), ∇[x](F(x)[1]), ∇[x](F(x)[2]), ∇[x](F(x)[3])))
f1(x) := transpose(□)  # error: This placeholder is empty.
u := [0; 2; 1; 3]
Newton(F, x, ε) :=
    n ← 0
    while 1
        p ← x - F(x)/f1(x)
        return x[1] if |p - x| < ε
        x ← p
        n ← n + 1
        break if n > 10000
    "fail"
ymax := 4
Newton(F, u, 10^-6) =  # error: These array dimensions do not match.
