f(x) := 2*cos(x) - sqrt(1 - x^2)
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Given
x := 0.6
d/dx(f(x)) == 0
x := Minimize(f, x) = 0.827188
x := 0.6
mR(f, x, h, ε) :=
    [(p ← f(x)), (x ← x + h)]
    if(|h| < ε, x, if(f(x) < p, mR(f, x, 1.1*h, ε), mR(f, x, -0.05*h, ε)))
n := mR(f, x, 0.1, 0.0001) = 0.829457
Given
f(x) := 2*cos(x) - sqrt(1 - x^2)
d/dx(f(x)) == 0
S := Find(x) = 0.827188
Para(f, x, h) :=
    [(y1 ← f(x)), (y0 ← f(x - h)), (y2 ← f(x + h))]
    x - 0.5*h*(y2 - y0)/(y2 - 2*y1 + y0)
dF(t) := t/sqrt(1 - t^2) - 2*sin(t)
MIN(F, dF, x, ε) :=
    [(h ← dF(x)), (x ← Para(F, x, h))]
    if(|h| < ε, x, MIN(F, dF, x, ε))
∇[t](f(t)) → t/sqrt(1 - t^2) - 2*sin(t)
MIN(f, dF, x, 0.001) = 3.05875e-12 - 2.95909e-12i
