Given
(d^2/dt^2(y(t))) - 2*t*(d/dt(y(t))) + y(t)*|y(t)| == 0
y(0) == 1
t := 0, 0.05 .. 2
y'(0) == -0.7
Sol := Odesolve(t, 2, 50)
d^2/dt^2(y(t)) == 2*t*(d/dt(y(t))) - y(t)*|y(t)|
y := [1; -0.7]
D(t, y) := [y[1]; 2*t*y[1] - y[0]*|y[0]|]
res := rkfixed(y, 0, 2, 20, D)
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(d^2/dt^2(y(t))) - 2*t*(d/dt(y(t))) + y(t)*|y(t)| == 0
y := 2
N := 50
h := 0.2
f(z) := rkfixed([2; z], 0, 2, N, D)[N, 1]
f(-2) = -4.62939
z := -2
Given
f(z) == -4
z := Find(z) = -2.15021
bc := rkfixed([2; z], 0, 2, 20, D)
Given
(d^2/dt^2(y(t))) - 2*t*(d/dt(y(t))) + y(t)*|y(t)| == 0
y(0) == 2
y(2) == -4
Sol := Odesolve(t, 2, 50)
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f(x) := e^(1/x^2)*atan(x) - 8
x := [0.0043; 0.0089; 0.35; 0.49; 0.88; 0.93; 1.24; 1.38; 1.42; 1.53]
k := 1 .. 10
x[k] := 0.15*k
