n := 9
i := 0 .. n
j := 0 .. n
x := [1, 5; 1.2, 4; 1.5, 5; 2, 10; 2.5, 11; 2.7, 11; 3, 12; 3.3, 8; 3.5, 10; 4, 11]
f(k) := sum(x[:, 1][i]*product(if(i == j, 1, (k - x[:, 0][j])/(x[:, 0][i] - x[:, 0][j])), j), i)
m := Thielecoeff(x[:, 0], x[:, 1])
a := cspline(x[:, 0], x[:, 1])
j(t) := Thiele(x[:, 0], m, t)
o(t) := interp(a, x[:, 0], x[:, 1], t)
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i := 0 .. 8
j := 0 .. 8
x := [7; 1; 19; 15; 3; 12; 5; 2; 2]
y := [13; 16; 20; 13; 3; 19; 4; 21; 7]
z := [81; 58; 76; 61; 66; 64; 70; 83; 29]
f(k1, k2) := sum(z[i]*product(if(i == j, 1, ([k1; k2] - [x[j]; y[j]])*([x[i]; y[i]] - [x[j]; y[j]])/(([x[i]; y[i]] - [x[j]; y[j]])*([x[i]; y[i]] - [x[j]; y[j]]))), j), i)
f(5, 7) = 32.8392
d(x, y) := d/dx(d/dy(f(x, y)))
d(5, 7) = -0.882995
h := CreateMesh(f, min(x), max(x), min(y), max(y))
0
# [component: inputs h]
