f(x) := cos(1/x^2)*1/sqrt(x)
integral(f(x), x = 0 .. 1) = -0.108387
sq(x, R) := f(x) + R*d^2/dx^2(f(x))/2
sq(0.5, 0) = -0.924392
sq(0.5, 0.0044) = -0.108484
trap(x) := x*(f(0 + 10^-6) + f(x))/2
trap(1) = 395.993
par(x) := x*(f(0 + 10^-6) + 4*f(x/2) + f(x))/6
par(1) = 131.382
Int(f, a, b, ε) :=
    [(m ← (a + b)/2), (h ← (b - a)/2)]
    r ← 2*h*f(m)
    p ← h*f(a + h/2)
    q ← h*f(m + h/2)
    if(|p + q - h| < ε, p + q, Int(f, a, m, ε) + Int(f, m, b, ε))
Int(f, 0, 1, 10^-4) = -0.115931
f(x, y) := x/(x + y)
