lsd(x, y, index) :=
    if(index == 0, [(in0 ← 0), (in1 ← 1), (in2 ← 2)], if(index == last(x), [(in0 ← last(x) - 2), (ln1 ← last(x) - 1), (ln2 ← last(x))], [(in0 ← index - 1), (in1 ← index), (in2 ← index + 1)]))
    [(A[0, 0] ← 1), (A[0, 1] ← 1), (A[0, 2] ← 1), (b[0] ← 0)]
    [(A[1, 0] ← (x[in0] - x[index])), (A[1, 1] ← (x[in1] - x[index])), (A[1, 2] ← (x[in2] - x[index])), (b[1] ← 1)]
    [(A[2, 0] ← (x[in0] - x[index])^2), (A[2, 1] ← (x[in1] - x[index])^2), (A[2, 2] ← (x[in2] - x[index])^2), (b[2] ← 0)]
    lsolve(A, b)
x := [1; 1.2; 1.5; 2; 2.5; 2.7; 3; 3.3; 3.5; 4]
y := [5; 4; 5; 10; 11; 11; 12; 8; 10; 11]
lsd(x, y, 9) = [0; 2.2518e15; -2.2518e15]
k(t) := lsd(x, y, t)[0]*y[0] + lsd(x, y, t)[1]*y[1] + lsd(x, y, t)[2]*y[2]
k(0) = -8.33333
k(1) = -1.66667
# Производная в точке x0
k(4) = 3
# Производная в точке x4
k(9) = -2.2518e15
# Производная в точке x9
dk(t) := k(floor(t))*|t - (floor(t) + 1)| + k(floor(t) + 1)*(t - floor(t))
fk(t, h) := if(t == 0, y[floor(t)] + dk(t)*h, fk(t - h) + dk(t)*h)  # error: This function refers to itself inconsistently.
fk(2, 0.1) =  # error: This variable is undefined.
m := 2
i := 0 .. last(x)
j := 0 .. m
A[i, j] := x[i]^j
A = [
    1, 1, 1;
    1, 1.2, 1.44;
    1, 1.5, 2.25;
    1, 2, 4;
    1, 2.5, 6.25;
    1, 2.7, 7.29;
    1, 3, 9;
    1, 3.3, 10.89;
    1, 3.5, 12.25;
    1, 4, 16
]
Z := transpose(A)*A
Z = [10, 24.7, 70.37; 24.7, 70.37, 219.223; 70.37, 219.223, 721.997]
b := transpose(A)*y
b = [87; 235.9; 704.57]
c := Z^-1*b
c = [-4.08794; 9.35123; -1.46506]
# Вычисление значения в заданной точке по формуле f'(x0)=α*f(x0)+β*f(x1)+γ*f(x2), где α, β и γ - решение системы линейных уравнений
φ(x) := sum(c[i]*x^i, i = 0 .. m)
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sum((y[i] - φ(x[i]))^2, i = 0 .. last(x)) = 18.93  # Сумма Квадратов погрешностей в известных точках
t := 0, 0.01 .. x[last(x)]
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